// COMSOL Multiphysics 5.3.1.180 model "nanoprism2.mph"
// Optical Scattering Off of a Gold Nanosphere
// modeldescr_woptics/scattering_nanosphere
// This example demonstrates the calculation of the scattering of a plane wave of light off of a gold nanosphere. The scattering is computed for the optical frequency range, over which gold can be modeled as a material with negative complex-valued permittivity. The far-field pattern and the losses are computed.
// Outline of the model tree

Parameters
  r0 = (5.48/2)[nm]  // Sphere radius
  lda = 633[nm]  // Wavelength
  t_air = lda/2  // Thickness of air around sphere
  t_pml = lda/2  // Thickness of PML
  separation = 2.53[nm]
  center_to_center = 2*r0+separation
  side = 100[nm]
  thickness = 20[nm]
  fill = 10[nm]

Variables
  var1 "Variables 1"
    l_gold = int_L(ewfd.Qrh)  // Heat losses
    n_gold = int_L(ewfd.nxx-j*ewfd.kixx)/(pi*r0^3/3)  // Refractive index of gold
    epsilonr_gold = n_gold^2  // Relative permittivity of gold
    deltaS_gold = 1/real(sqrt(-(ewfd.k0*n_gold)^2))  // Skin depth of gold

Selections
  sel1: Explicit "outer" on no boundaries
  sel2: Explicit on domains 2, 3

Couplings
  intop1: Integration on no domains | opname = int_L

Geometry
  geom1 "Geometry 1" (3D, length unit m)
    blk1: Block | base = center; size = {lda, lda, lda}
    wp1: WorkPlane | quickplane = yz; unite = on
      pol1: Polygon | source = table; table = {{-side/2, -sqrt(3)/6*side}, {side/2, -sqrt(3)/6*side}, {0, sqrt(3)/3*side}}
      fil1: Fillet | point = pol1(1) points 1-3; radius = fill
    ext1: Extrude
      workplane = wp1
      input = wp1
      distance = {thickness/2, -thickness/2}
      scale = {{1, 1}, {1, 1}}
      displ = {{0, 0}, {0, 0}}
      twist = {0, 0}
      baseid = {3, 1, 0, 4, 2}
    fin: Finalize "Form Union"

Materials
  mat1: Common "Air" on all domains
    def "Basic"
      relpermeability = 1
      relpermittivity = 1
      dynamicviscosity = eta(T[1/K])[Pa*s]
      ratioofspecificheat = 1.4
      electricconductivity = 0[S/m]
      heatcapacity = Cp(T[1/K])[J/(kg*K)]
      density = rho(pA[1/Pa],T[1/K])[kg/m^3]
      thermalconductivity = k(T[1/K])[W/(m*K)]
      soundspeed = cs(T[1/K])[m/s]
      eta: Piecewise | arg = T; pieces = {200.0, 1600.0, -8.38278E-7+8.35717342E-8*T^1-7.69429583E-11*T^2+4.6437266E-14*T^3-1.06585607E-17*T^4}
      Cp: Piecewise | arg = T; pieces = {200.0, 1600.0, 1047.63657-0.372589265*T^1+9.45304214E-4*T^2-6.02409443E-7*T^3+1.2858961E-10*T^4}
      rho: Analytic | expr = pA*0.02897/R_const[K*mol/J]/T; args = {pA, T}; dermethod = manual; argders = {{pA, d(pA*0.02897/R_const/T,pA)}, {T, d(pA*0.02897/R_const/T,T)}}
      k: Piecewise | arg = T; pieces = {200.0, 1600.0, -0.00227583562+1.15480022E-4*T^1-7.90252856E-8*T^2+4.11702505E-11*T^3-7.43864331E-15*T^4}
      cs: Analytic | expr = sqrt(1.4*287*T); args = T; dermethod = manual; argders = {T, d(sqrt(1.4*287*T),T)}
    RefractiveIndex
      n = 1
      ki = 0
  mat2: Common "Au (Rakic)" on selection sel2
    RefractiveIndex
      n = n_interp(1[1/m]*c_const/freq)
      ki = k_interp(1[1/m]*c_const/freq)
      n_interp: Interpolation
        table = 
          {2.066e-07, 1.25223320824}
          {2.1089508319E-7, 1.28860501667}
          {2.15279458439E-7, 1.32053986347}
          {2.19754982075E-7, 1.34888336249}
          {2.24323549012E-7, 1.3746284289}
          {2.28987093564E-7, 1.39882611415}
          {2.33747590255E-7, 1.42248550103}
          {2.38607054657E-7, 1.44647562039}
          {2.43567544248E-7, 1.47144312879}
          {2.48631159276e-07, 1.49775668894}
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        interp = piecewisecubic
      k_interp: Interpolation
        table = 
          {2.066e-07, 1.98591656445}
          {2.1089508319E-7, 1.97534779229}
          {2.15279458439E-7, 1.96597777856}
          {2.19754982075E-7, 1.95853718525}
          {2.24323549012E-7, 1.95347479861}
          {2.28987093564E-7, 1.95092054945}
          {2.33747590255E-7, 1.95067979422}
          {2.38607054657E-7, 1.9522622682}
          {2.43567544248E-7, 1.95494272809}
          {2.48631159276e-07, 1.95784420876}
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        interp = piecewisecubic
  mat3: Common "Ag (Rakic)" on selection sel2
    RefractiveIndex
      n = n_interp(1[1/m]*c_const/freq)
      ki = k_interp(1[1/m]*c_const/freq)
      n_interp: Interpolation
        table = 
          {2.066e-07, 0.503999788208}
          {2.1089508319E-7, 0.554820958015}
          {2.15279458439E-7, 0.611868931581}
          {2.19754982075E-7, 0.670439250054}
          {2.24323549012E-7, 0.726540962221}
          {2.28987093564E-7, 0.776528284552}
          {2.33747590255E-7, 0.816935367231}
          {2.38607054657E-7, 0.844330284417}
          {2.43567544248E-7, 0.855169339166}
          {2.48631159276e-07, 0.846331283615}
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        interp = piecewisecubic
      k_interp: Interpolation
        table = 
          {2.066e-07, 0.870386410508}
          {2.1089508319E-7, 0.965578874806}
          {2.15279458439E-7, 1.0402424751}
          {2.19754982075E-7, 1.0963412968}
          {2.24323549012E-7, 1.13584089596}
          {2.28987093564E-7, 1.16100205284}
          {2.33747590255E-7, 1.17463650616}
          {2.38607054657E-7, 1.18045934249}
          {2.43567544248E-7, 1.18390627144}
          {2.48631159276e-07, 1.19421880639}
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        interp = piecewisecubic

Physics
  ewfd: ElectromagneticWavesFrequencyDomain on all domains
    dependent variable E = {Ex, Ey, Ez}
    BackgroundField.SolveFor = scatteredField
    BackgroundField.Eb = {0, 0, exp(-j*ewfd.k0*x)}
    MeshControl.SizeControlParameter = Wavelength
    MeshControl.PhysicsControlledMeshMinimumWavelength = lda
    MeshControl.ResolveWaveInLossyMedia = 1
    wee1: WaveEquationElectric (default)
    pec1: PerfectElectricConductor (default)
    init1: init "Initial Values 1" (default)
    sctr1: Scattering "Scattering Boundary Condition 1" on boundaries 1, 21
    pmc1: PerfectMagneticConductor (disabled) on no boundaries
    ffd1: FarFieldDomain (disabled) on no domains
      ffc1: FarFieldCalculation on no boundaries
        SymmetryInPlane1 = 1
        SymmetryInPlane2 = 1
        SymmetryType2 = SymmetryInHz
    pc1: PeriodicCondition on boundaries 3, 4 | destinationDomains: boundaries 4
    pc2: PeriodicCondition on boundaries 2, 5 | destinationDomains: boundaries 5

Mesh
  mesh1 "Mesh 1" (physics-controlled)
    size: MeshSizeDefault | hauto = 3

Studies
  std1 "Study 1"
    param: Parametric "Parametric Sweep" (disabled) | pname = lda; plistarr = range(400[nm],300[nm]/30,700[nm])
    wave: Wavelength "Wavelength Domain" | plist = lda

Solver configurations
  sol1 "Solution 1" (study std1)
    v1: Variables "Dependent Variables 1"
    s1: Stationary "Stationary Solver 1" | stol = 0.01
      p1: Parametric | pname = lambda0; plistarr = lda; punit = µm; pcontinuationmode = no
      fc1: FullyCoupled | linsolver = d1
      d1: Direct "Suggested Direct Solver (ewfd)"
  sol2 "Parametric Solutions 1" (study std1)

Datasets
  dset1: Solution | solution = sol1
  dset2: Solution | solution = sol2
  cpl1: CutPlane | data = dset1

Plots
  pg1: PlotGroup3D "3D Plot Group 1" | data = dset1
    slc1: Slice | expr = ewfd.normE
  pg2: PolarGroup "Polar Plot Group 2" | data = dset2
    ff1: FarField | expr = ewfd.normEfar; phidisc = 100; normal = {0, 1, 0}; legends = E-plane
    ff2: FarField | expr = ewfd.normEfar; phidisc = 100; legends = H-plane
  pg3: PlotGroup1D "1D Plot Group 3" | data = dset2; xlabel = Wavelength (m)
    glob1: Global | expr = l_gold; unit = W; descr = Heat losses
  pg4: PlotGroup1D "1D Plot Group 4" | data = dset2; xlabel = Wavelength (m); ylabel = Refractive index
    glob1: Global
      expr = {real(n_gold), imag(n_gold)}
      unit = {1, 1}
      descr = {"Refractive index of gold, real part", "Refractive index of gold, imaginary part"}
      legends = {"Refractive index of gold, real part", "Refractive index of gold, imaginary part"}
  pg5: PlotGroup1D "1D Plot Group 5" | data = dset2; xlabel = Wavelength (m); ylabel = Relative permittivity
    glob1: Global
      expr = {real(epsilonr_gold), imag(epsilonr_gold)}
      unit = {1, 1}
      descr = {"Relative permittivity of gold, real part", "Relative permittivity of gold, imaginary part"}
      legends = {"Relative permittivity of gold, real part", "Relative permittivity of gold, imaginary part"}
  pg6: PlotGroup1D "1D Plot Group 6" | data = dset2; xlabel = Wavelength (m)
    glob1: Global | expr = deltaS_gold; unit = nm; descr = Skin depth of gold
  pg7: PlotGroup2D "2D Plot Group 7" | data = cpl1
    surf1: Surface | expr = ewfd.normE